Model 3D Gait Model with Simple Arms:
  angle_units: radians
  credits:
    Delp S.L., Loan J.P., Hoy M.G., Zajac F.E., Topp E.L., Rosen J.M., Thelen D.G., Anderson F.C., Seth A., Hamner S.R.
  publications:
    Notes: 3D, 23 DOF gait model created by D.G. Thelen, Univ. of Wisconsin-Madison, and Samuel Hamner, Ajay Seth, Frank C. Anderson, and Scott L. Delp, Stanford University. Lower extremity joint defintions based on Delp et al. (1990). Low back joint and anthropometry based on Anderson and Pandy (1999, 2001). Planar knee model of Yamaguchi and Zajac (1989). Seth removed the patella to avoid kinematic constraints; insertions of the quadrucepts are handled with moving points in the tibia frame. Hamner added arms adapted from Holzbaur et al., 2005.
    Hamner, S.R., Seth, A, Delp, S.L.: Muscle contributions to propulsion and support during running. Journal of Biomechanics, 2010.
    Delp, S.L., Loan, J.P., Hoy, M.G., Zajac, F.E., Topp E.L., Rosen, J.M.: An interactive graphics-based model of the lower extremity to study orthopaedic surgical procedures, IEEE Transactions on Biomedical Engineering, vol. 37, pp. 757-767, 1990.
    Yamaguchi G.T., Zajac F.E.: A planar model of the knee joint to characterize the knee extensor mechanism." J . Biomech. vol. 21. pp. 1-10. 1989.
    Anderson F.C., Pandy M.G.: A dynamic optimization solution for vertical jumping in three dimensions. Computer Methods in Biomechanics and Biomedical Engineering 2:201-231, 1999.
    Anderson F.C., Pandy M.G.: Dynamic optimization of human walking. Journal of Biomechanical Engineering 123:381-390, 2001.
    Holzbaur, KR, WM Murray and SL Delp, 2005. A model of the upper extremity for simulating musculoskeletal surgery and analyzing neuromuscular control. Ann Biomed Eng 33(6): 829-840.
  defaults: Thelen2003Muscle defaultmuscle: pennation_angle=0 max_contraction_velocity=10 muscle_model=9 time_scale=0.1
      damping=0.05 activation_time_constant=0.01 deactivation_time_constant=0.04 Af=0.3 Flen=1.8 Vmax=10 Vmax0=5
      FmaxTendonStrain=0.033 FmaxMuscleStrain=0.6 KshapeActive=0.5 KshapePassive=4 muscle_density=1056
      max_isometric_stress=350000
    tendon_force_length_curve: natCubicSpline: x=(-10 -0.002 -0.001 0 0.00131 0.00281 0.00431 0.00581 0.00731 0.00881 0.0103 0.0118 0.0123 9.2 9.201 9.202 20)
        y=(0 0 0 0 0.0108 0.0257 0.0435 0.0652 0.0915 0.123 0.161 0.208 0.227 345 345 345 345)
    active_force_length_curve: natCubicSpline: x=(-5.307692 -4.307692 -1.923077 -0.884615 -0.269231 0.230769 0.461538 0.52725 0.62875 0.71875 0.86125 1.045 1.2175 1.43875 1.5 1.615385 2 2.961538 3.692308 5.461538 9.901902)
        y=(0.012188 0.021899 0.036466 0.052493 0.075312 0.114158 0.157859 0.226667 0.636667 0.856667 0.95 0.993333 0.77 0.246667 0.193821 0.133252 0.072683 0.044417 0.036341 0.021899 0.007332)
    passive_force_length_curve: natCubicSpline: x=(-5 0.998 0.999 1 1.1 1.2 1.3 1.4 1.5 1.6 1.601 1.602 5)
        y=(0 0 0 0 0.035 0.12 0.26 0.55 1.17 2 2 2 2)
    force_velocity_curve: natCubicSpline: x=(-1 -0.95 -0.9 -0.85 -0.8 -0.75 -0.7 -0.65 -0.6 -0.55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)
        y=(0 0.010417 0.021739 0.034091 0.047619 0.0625 0.078947 0.097222 0.117647 0.140625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)
  ActuatorSet:
    ObjectGroup R_hip_abd: members=(glut_max1_r glut_med1_r glut_med2_r glut_med3_r glut_min1_r glut_min2_r glut_min3_r peri_r sar_r tfl_r)
    ObjectGroup R_hip_flex: members=(add_brev_r add_long_r glut_med1_r glut_min1_r grac_r iliacus_r pect_r psoas_r rect_fem_r sar_r tfl_r)
    ObjectGroup R_hip_inrot: members=(glut_med1_r glut_min1_r iliacus_r psoas_r tfl_r)
    ObjectGroup R_hip_exrot: members=(gem_r glut_med3_r glut_min3_r peri_r quad_fem_r)
    ObjectGroup R_hip_ext: members=(add_long_r add_mag1_r add_mag2_r add_mag3_r bifemlh_r glut_max1_r glut_max2_r glut_max3_r glut_med3_r glut_min3_r semimem_r semiten_r)
    ObjectGroup R_hip_add: members=(add_brev_r add_long_r add_mag1_r add_mag2_r add_mag3_r bifemlh_r grac_r pect_r semimem_r semiten_r)
    ObjectGroup R_knee_bend: members=(bifemlh_r bifemsh_r grac_r lat_gas_r med_gas_r sar_r semimem_r semiten_r)
    ObjectGroup R_knee_ext: members=(rect_fem_r vas_int_r vas_lat_r vas_med_r)
    ObjectGroup R_ankle_pf: members=(flex_dig_r flex_hal_r lat_gas_r med_gas_r per_brev_r per_long_r soleus_r tib_post_r)
    ObjectGroup R_inverter: members=(ext_hal_r flex_dig_r flex_hal_r tib_ant_r tib_post_r)
    ObjectGroup R_ankle_df: members=(ext_dig_r ext_hal_r per_tert_r tib_ant_r)
    ObjectGroup R_everter: members=(ext_dig_r per_brev_r per_long_r per_tert_r)
    ObjectGroup L_hip_abd: members=(glut_max1_l glut_med1_l glut_med2_l glut_med3_l glut_min1_l glut_min2_l glut_min3_l peri_l sar_l tfl_l)
    ObjectGroup L_hip_flex: members=(add_brev_l add_long_l glut_med1_l glut_min1_l grac_l iliacus_l pect_l psoas_l rect_fem_l sar_l tfl_l)
    ObjectGroup L_hip_inrot: members=(glut_med1_l glut_min1_l iliacus_l psoas_l tfl_l)
    ObjectGroup L_hip_exrot: members=(gem_l glut_med3_l glut_min3_l peri_l quad_fem_l)
    ObjectGroup L_hip_ext: members=(add_long_l add_mag1_l add_mag2_l add_mag3_l bifemlh_l glut_max1_l glut_max2_l glut_max3_l glut_med3_l glut_min3_l semimem_l semiten_l)
    ObjectGroup L_hip_add: members=(add_brev_l add_long_l add_mag1_l add_mag2_l add_mag3_l bifemlh_l grac_l pect_l semimem_l semiten_l)
    ObjectGroup L_knee_bend: members=(bifemlh_l bifemsh_l grac_l lat_gas_l med_gas_l sar_l semimem_l semiten_l)
    ObjectGroup L_knee_ext: members=(rect_fem_l vas_int_l vas_lat_l vas_med_l)
    ObjectGroup L_ankle_pf: members=(flex_dig_l flex_hal_l lat_gas_l med_gas_l per_brev_l per_long_l soleus_l tib_post_l)
    ObjectGroup L_inverter: members=(ext_hal_l flex_dig_l flex_hal_l tib_ant_l tib_post_l)
    ObjectGroup L_ankle_df: members=(ext_dig_l ext_hal_l per_tert_l tib_ant_l)
    ObjectGroup L_everter: members=(ext_dig_l per_brev_l per_long_l per_tert_l)
    ObjectGroup back_ext: members=(ercspn_l ercspn_r)
    ObjectGroup back_rlb: members=(ercspn_r extobl_r intobl_r)
    ObjectGroup back_introt: members=(ercspn_r extobl_l intobl_r)
    ObjectGroup back_llb: members=(ercspn_l extobl_l intobl_l)
    ObjectGroup back_extrot: members=(ercspn_l extobl_r intobl_l)
    ObjectGroup back_flex: members=(extobl_l extobl_r intobl_l intobl_r)
    Thelen2003Muscle glut_med1_r: max_isometric_force=819 optimal_fiber_length=0.0535 tendon_slack_length=0.078
        pennation_angle=0.1396263 muscle_model=9
      MusclePoint: pelvis (-0.0408 0.0304 0.1209)
      MusclePoint: femur_r (-0.0218 -0.0117 0.0555)
    Thelen2003Muscle glut_med2_r: max_isometric_force=573 optimal_fiber_length=0.0845 tendon_slack_length=0.053
        pennation_angle=0 muscle_model=9
      MusclePoint: pelvis (-0.0855 0.0445 0.0766)
      MusclePoint: femur_r (-0.0258 -0.0058 0.0527)
    Thelen2003Muscle glut_med3_r: max_isometric_force=653 optimal_fiber_length=0.0646 tendon_slack_length=0.053
        pennation_angle=0.3316126 muscle_model=9
      MusclePoint: pelvis (-0.1223 0.0105 0.0648)
      MusclePoint: femur_r (-0.0309 -0.0047 0.0518)
    Thelen2003Muscle glut_min1_r: max_isometric_force=270 optimal_fiber_length=0.068 tendon_slack_length=0.016
        pennation_angle=0.1745329 muscle_model=9
      MusclePoint: pelvis (-0.0467 -0.008 0.1056)
      MusclePoint: femur_r (-0.0072 -0.0104 0.056)
    Thelen2003Muscle glut_min2_r: max_isometric_force=285 optimal_fiber_length=0.056 tendon_slack_length=0.026
        pennation_angle=0 muscle_model=9
      MusclePoint: pelvis (-0.0633 -0.0065 0.0991)
      MusclePoint: femur_r (-0.0096 -0.0104 0.056)
    Thelen2003Muscle glut_min3_r: max_isometric_force=323 optimal_fiber_length=0.038 tendon_slack_length=0.051
        pennation_angle=0.01745329 muscle_model=9
      MusclePoint: pelvis (-0.0834 -0.0063 0.0856)
      MusclePoint: femur_r (-0.0135 -0.0083 0.055)
    Thelen2003Muscle semimem_r: max_isometric_force=1288 optimal_fiber_length=0.08 tendon_slack_length=0.359
        pennation_angle=0.2617994 muscle_model=9
      MusclePoint: pelvis (-0.1192 -0.09747 0.07151)
      MuscleViaPoint: tibia_r (-0.0348 -0.03519 -0.01891) coordinate=knee_angle_r range=(-0.5585054 0.1745329)
      MusclePoint: tibia_r (-0.027 -0.04771 -0.01957)
    Thelen2003Muscle semiten_r: max_isometric_force=410 optimal_fiber_length=0.201 tendon_slack_length=0.2555
        pennation_angle=0.08726646 muscle_model=9
      MusclePoint: pelvis (-0.12635 -0.10988 0.06039)
      MuscleViaPoint: tibia_r (-0.04203 -0.02859 -0.02277) coordinate=knee_angle_r range=(-0.3316126 0.1745329)
      MusclePoint: tibia_r (-0.03322 -0.05282 -0.02288)
      MusclePoint: tibia_r (-0.0113 -0.0746 -0.0245)
      MusclePoint: tibia_r (0.0027 -0.0956 -0.0193)
    Thelen2003Muscle bifemlh_r: max_isometric_force=896 optimal_fiber_length=0.109 tendon_slack_length=0.326
        pennation_angle=0 muscle_model=9
      MusclePoint: pelvis (-0.12596 -0.10257 0.06944)
      MusclePoint: tibia_r (-0.0301 -0.036 0.02943)
      MusclePoint: tibia_r (-0.0234 -0.0563 0.0343)
    Thelen2003Muscle bifemsh_r: max_isometric_force=804 optimal_fiber_length=0.173 tendon_slack_length=0.089
        pennation_angle=0.4014257 muscle_model=9
      MusclePoint: femur_r (0.005 -0.2111 0.0234)
      MusclePoint: tibia_r (-0.0301 -0.036 0.02943)
      MusclePoint: tibia_r (-0.0234 -0.0563 0.0343)
    Thelen2003Muscle sar_r: max_isometric_force=156 optimal_fiber_length=0.52 tendon_slack_length=0.1 pennation_angle=0
        muscle_model=9
      MusclePoint: pelvis (-0.0153 -0.0013 0.1242)
      MusclePoint: femur_r (-0.003 -0.3568 -0.0421)
      MusclePoint: tibia_r (-0.0056 -0.0419 -0.0399)
      MusclePoint: tibia_r (0.006 -0.0589 -0.0383)
      MusclePoint: tibia_r (0.0243 -0.084 -0.0252)
    Thelen2003Muscle add_long_r: max_isometric_force=627 optimal_fiber_length=0.138 tendon_slack_length=0.11
        pennation_angle=0.1047198 muscle_model=9
      MusclePoint: pelvis (-0.0316 -0.0836 0.0169)
      MusclePoint: femur_r (0.005 -0.2111 0.0234)
    Thelen2003Muscle add_brev_r: max_isometric_force=429 optimal_fiber_length=0.133 tendon_slack_length=0.02
        pennation_angle=0 muscle_model=9
      MusclePoint: pelvis (-0.0587 -0.0915 0.0164)
      MusclePoint: femur_r (0.0009 -0.1196 0.0294)
    Thelen2003Muscle add_mag1_r: max_isometric_force=381 optimal_fiber_length=0.087 tendon_slack_length=0.06
        pennation_angle=0.08726646 muscle_model=9
      MusclePoint: pelvis (-0.0732 -0.1174 0.0255)
      MusclePoint: femur_r (-0.0045 -0.1211 0.0339)
    Thelen2003Muscle add_mag2_r: max_isometric_force=343 optimal_fiber_length=0.121 tendon_slack_length=0.12
        pennation_angle=0.05235988 muscle_model=9
      MusclePoint: pelvis (-0.0831 -0.1192 0.0308)
      MusclePoint: femur_r (0.0054 -0.2285 0.0227)
    Thelen2003Muscle add_mag3_r: max_isometric_force=488 optimal_fiber_length=0.131 tendon_slack_length=0.249
        pennation_angle=0.08726646 muscle_model=9
      MusclePoint: pelvis (-0.11108 -0.11413 0.04882)
      MusclePoint: femur_r (0.007 -0.3837 -0.0266)
    Thelen2003Muscle tfl_r: max_isometric_force=233 optimal_fiber_length=0.095 tendon_slack_length=0.425
        pennation_angle=0.05235988 muscle_model=9
      MusclePoint: pelvis (-0.0311 0.0214 0.1241)
      MusclePoint: femur_r (0.0294 -0.0995 0.0597)
      MusclePoint: femur_r (0.0054 -0.4049 0.0357)
      MusclePoint: tibia_r (0.006 -0.0487 0.0297)
    Thelen2003Muscle pect_r: max_isometric_force=266 optimal_fiber_length=0.1 tendon_slack_length=0.033
        pennation_angle=0 muscle_model=9
      MusclePoint: pelvis (-0.0431 -0.0768 0.0451)
      MusclePoint: femur_r (-0.0122 -0.0822 0.0253)
    Thelen2003Muscle grac_r: max_isometric_force=162 optimal_fiber_length=0.352 tendon_slack_length=0.126
        pennation_angle=0.05235988 muscle_model=9
      MusclePoint: pelvis (-0.07401 -0.1187 0.02794)
      MuscleViaPoint: tibia_r (-0.02657 -0.0319 -0.03774) coordinate=knee_angle_r range=(-0.4363323 0.1745329)
      MusclePoint: tibia_r (-0.01943 -0.05153 -0.0358)
      MusclePoint: tibia_r (0.006 -0.0836 -0.0228)
    Thelen2003Muscle glut_max1_r: max_isometric_force=573 optimal_fiber_length=0.142 tendon_slack_length=0.125
        pennation_angle=0.08726646 muscle_model=9
      MusclePoint: pelvis (-0.1195 0.0612 0.07)
      MusclePoint: pelvis (-0.1291 0.0012 0.0886)
      MusclePoint: femur_r (-0.0457 -0.0248 0.0392)
      MusclePoint: femur_r (-0.0277 -0.0566 0.047)
    Thelen2003Muscle glut_max2_r: max_isometric_force=819 optimal_fiber_length=0.147 tendon_slack_length=0.127
        pennation_angle=0 muscle_model=9
      MusclePoint: pelvis (-0.1349 0.0176 0.0563)
      MusclePoint: pelvis (-0.1376 -0.052 0.0914)
      MusclePoint: femur_r (-0.0426 -0.053 0.0293)
      MusclePoint: femur_r (-0.0156 -0.1016 0.0419)
    Thelen2003Muscle glut_max3_r: max_isometric_force=552 optimal_fiber_length=0.144 tendon_slack_length=0.145
        pennation_angle=0.08726646 muscle_model=9
      MusclePoint: pelvis (-0.1556 -0.0314 0.0058)
      MusclePoint: pelvis (-0.1529 -0.1052 0.0403)
      MusclePoint: femur_r (-0.0299 -0.1041 0.0135)
      MusclePoint: femur_r (-0.006 -0.1419 0.0411)
    Thelen2003Muscle iliacus_r: max_isometric_force=1073 optimal_fiber_length=0.1 tendon_slack_length=0.1
        pennation_angle=0.122173 muscle_model=9
      MusclePoint: pelvis (-0.0674 0.0365 0.0854)
      MusclePoint: pelvis (-0.0258 -0.055 0.0811)
      MuscleViaPoint: pelvis (-0.0288 -0.0805 0.0816) coordinate=hip_flexion_r range=(-1.570796 0.7853982)
      MusclePoint: femur_r (0.0017 -0.0543 0.0057)
      MusclePoint: femur_r (-0.0193 -0.0621 0.0129)
    Thelen2003Muscle psoas_r: max_isometric_force=1113 optimal_fiber_length=0.1 tendon_slack_length=0.16
        pennation_angle=0.1396263 muscle_model=9
      MusclePoint: pelvis (-0.0647 0.0887 0.0289)
      MusclePoint: pelvis (-0.0238 -0.057 0.0759)
      MuscleViaPoint: pelvis (-0.0288 -0.0805 0.0816) coordinate=hip_flexion_r range=(-1.570796 0.7853982)
      MusclePoint: femur_r (0.0016 -0.0507 0.0038)
      MusclePoint: femur_r (-0.0188 -0.0597 0.0104)
    Thelen2003Muscle quad_fem_r: max_isometric_force=381 optimal_fiber_length=0.054 tendon_slack_length=0.024
        pennation_angle=0 muscle_model=9
      MusclePoint: pelvis (-0.1143 -0.1151 0.052)
      MusclePoint: femur_r (-0.0381 -0.0359 0.0366)
    Thelen2003Muscle gem_r: max_isometric_force=164 optimal_fiber_length=0.024 tendon_slack_length=0.039
        pennation_angle=0 muscle_model=9
      MusclePoint: pelvis (-0.1133 -0.082 0.0714)
      MusclePoint: femur_r (-0.0142 -0.0033 0.0443)
    Thelen2003Muscle peri_r: max_isometric_force=444 optimal_fiber_length=0.026 tendon_slack_length=0.115
        pennation_angle=0.1745329 muscle_model=9
      MusclePoint: pelvis (-0.1396 0.0003 0.0235)
      MusclePoint: pelvis (-0.1193 -0.0276 0.0657)
      MusclePoint: femur_r (-0.0148 -0.0036 0.0437)
    Thelen2003Muscle rect_fem_r: max_isometric_force=1169 optimal_fiber_length=0.114 tendon_slack_length=0.31
        pennation_angle=0.08726646 muscle_model=9
      MusclePoint: pelvis (-0.0295 -0.0311 0.0968)
      MuscleViaPoint: femur_r (0.0334 -0.403 0.0019) coordinate=knee_angle_r range=(-2.617994 -1.459968)
      MovingMusclePoint: tibia_r x_coordinate=knee_angle_r y_coordinate=knee_angle_r z_coordinate=knee_angle_r
        XAttachment:
          natCubicSpline: x=(-2.094395 -1.999973 -1.570796 -1.457524 -1.396263 -1.047198 -0.6981317 -0.5263913 -0.3490659 -0.1745329 0 0.0001745329 0.0003490659 0.02792527 0.08726646 0.1745329 2.094395)
              y=(0.0155805 0.01799382 0.0275081 0.02965635 0.03076155 0.03656953 0.04220742 0.04509018 0.048391 0.05342993 0.06175755 0.06176687 0.0617762 0.06330831 0.06699396 0.07330346 0.05734807)
        YAttachment:
          natCubicSpline: x=(-2.094395 -1.999973 -1.570796 -1.457524 -1.396263 -1.047198 -0.6981317 -0.5263913 -0.3490659 -0.1745329 0 0.0001745329 0.0003490659 0.02792527 0.08726646 0.1745329 2.094395)
              y=(0.02341162 0.02376131 0.02511413 0.02527948 0.02531463 0.0249184 0.02423731 0.02384473 0.02341972 0.0227644 0.02098402 0.02098143 0.02097883 0.02052247 0.01917541 0.01595544 -0.06737737)
        ZAttachment:
          natCubicSpline: x=(-2.0944 0.1745) y=(0.0014 0.0014)
    Thelen2003Muscle vas_med_r: max_isometric_force=1294 optimal_fiber_length=0.089 tendon_slack_length=0.126
        pennation_angle=0.08726646 muscle_model=9
      MusclePoint: femur_r (0.014 -0.2099 0.0188)
      MusclePoint: femur_r (0.0356 -0.2769 0.0009)
      MuscleViaPoint: femur_r (0.037 -0.4048 -0.0125) coordinate=knee_angle_r range=(-2.617994 -1.210037)
      MuscleViaPoint: femur_r (0.0274 -0.4255 -0.0131) coordinate=knee_angle_r range=(-2.617994 -1.780061)
      MovingMusclePoint: tibia_r x_coordinate=knee_angle_r y_coordinate=knee_angle_r z_coordinate=knee_angle_r
        XAttachment:
          natCubicSpline: x=(-2.094395 -1.999973 -1.570796 -1.457524 -1.396263 -1.047198 -0.6981317 -0.5263913 -0.3490659 -0.1745329 0 0.0001745329 0.0003490659 0.02792527 0.08726646 0.1745329 2.094395)
              y=(0.009810966 0.01222429 0.02173709 0.02388509 0.02499024 0.03079589 0.03641872 0.03928706 0.04256544 0.04757642 0.05595861 0.0559681 0.05597761 0.05754187 0.06133679 0.06795031 0.06293317)
        YAttachment:
          natCubicSpline: x=(-2.094395 -1.999973 -1.570796 -1.457524 -1.396263 -1.047198 -0.6981317 -0.5263913 -0.3490659 -0.1745329 0 0.0001745329 0.0003490659 0.02792527 0.08726646 0.1745329 2.094395)
              y=(0.0224154 0.02276508 0.02412648 0.02429332 0.02432872 0.02394625 0.02335927 0.02306768 0.02283423 0.0226362 0.02179166 0.02179031 0.02178894 0.02153648 0.02068419 0.01832688 -0.06562047)
        ZAttachment:
          natCubicSpline: x=(-2.094395 2.094395) y=(-0.0146 -0.0146)
    Thelen2003Muscle vas_int_r: max_isometric_force=1365 optimal_fiber_length=0.087 tendon_slack_length=0.136
        pennation_angle=0.05235988 muscle_model=9
      MusclePoint: femur_r (0.029 -0.1924 0.031)
      MusclePoint: femur_r (0.0335 -0.2084 0.0285)
      MuscleViaPoint: femur_r (0.0343 -0.403 0.0055) coordinate=knee_angle_r range=(-2.617994 -1.42)
      MovingMusclePoint: tibia_r x_coordinate=knee_angle_r y_coordinate=knee_angle_r z_coordinate=knee_angle_r
        XAttachment:
          natCubicSpline: x=(-2.094395 -1.999973 -1.570796 -1.457524 -1.396263 -1.047198 -0.6981317 -0.5263913 -0.3490659 -0.1745329 0 0.0001745329 0.0003490659 0.02792527 0.08726646 0.1745329 2.094395)
              y=(0.008273297 0.01068662 0.02020416 0.02235298 0.02345827 0.02927151 0.03494648 0.03787104 0.04125689 0.04652869 0.05546322 0.05547346 0.05548371 0.05717169 0.06127199 0.06843685 0.06488175)
        YAttachment:
          natCubicSpline: x=(-2.094395 -1.999973 -1.570796 -1.457524 -1.396263 -1.047198 -0.6981317 -0.5263913 -0.3490659 -0.1745329 0 0.0001745329 0.0003490659 0.02792527 0.08726646 0.1745329 2.094395)
              y=(0.02559904 0.02594872 0.02731241 0.02747964 0.02751511 0.02713628 0.02657369 0.02630726 0.0261187 0.02601292 0.02529232 0.02529107 0.02528981 0.02505258 0.02421913 0.02182878 -0.06857056)
        ZAttachment:
          natCubicSpline: x=(-2.0944 2.0944) y=(0.0018 0.0018)
    Thelen2003Muscle vas_lat_r: max_isometric_force=1871 optimal_fiber_length=0.084 tendon_slack_length=0.157
        pennation_angle=0.08726646 muscle_model=9
      MusclePoint: femur_r (0.0048 -0.1854 0.0349)
      MusclePoint: femur_r (0.0269 -0.2591 0.0409)
      MuscleViaPoint: femur_r (0.0361 -0.403 0.0205) coordinate=knee_angle_r range=(-2.617994 -1.210037)
      MuscleViaPoint: femur_r (0.0253 -0.4243 0.0184) coordinate=knee_angle_r range=(-2.617994 -1.920037)
      MovingMusclePoint: tibia_r x_coordinate=knee_angle_r y_coordinate=knee_angle_r z_coordinate=knee_angle_r
        XAttachment:
          natCubicSpline: x=(-2.094395 -1.999973 -1.570796 -1.457524 -1.396263 -1.047198 -0.6981317 -0.5263913 -0.3490659 -0.1745329 0 0.0001745329 0.0003490659 0.02792527 0.08726646 0.1745329 2.094395)
              y=(0.01428971 0.01670304 0.02621452 0.02836229 0.0294674 0.03527091 0.04087847 0.04372914 0.04697043 0.05187423 0.05995571 0.05996473 0.05997376 0.06145775 0.06503513 0.07118671 0.05837658)
        YAttachment:
          natCubicSpline: x=(-2.094395 -1.999973 -1.570796 -1.457524 -1.396263 -1.047198 -0.6981317 -0.5263913 -0.3490659 -0.1745329 0 0.0001745329 0.0003490659 0.02792527 0.08726646 0.1745329 2.094395)
              y=(0.02153176 0.02188145 0.02323619 0.02340187 0.02343708 0.02304394 0.02238424 0.02201509 0.02163591 0.02109712 0.0195864 0.01958419 0.01958197 0.01919002 0.01800795 0.0151073 -0.06534213)
        ZAttachment:
          natCubicSpline: x=(-2.094395 2.094395) y=(0.0165 0.0165)
    Thelen2003Muscle med_gas_r: max_isometric_force=1558 optimal_fiber_length=0.06 tendon_slack_length=0.39
        pennation_angle=0.296706 muscle_model=9
      MusclePoint: femur_r (-0.019 -0.3929 -0.0235)
      MuscleViaPoint: femur_r (-0.03 -0.4022 -0.0258) coordinate=knee_angle_r range=(-0.7853982 0.1745329)
      MusclePoint: calcn_r (0 0.031 -0.0053)
    Thelen2003Muscle lat_gas_r: max_isometric_force=683 optimal_fiber_length=0.064 tendon_slack_length=0.38
        pennation_angle=0.1396263 muscle_model=9
      MusclePoint: femur_r (-0.022 -0.3946 0.0272)
      MuscleViaPoint: femur_r (-0.03 -0.4018 0.0274) coordinate=knee_angle_r range=(-0.7853982 0.1745329)
      MusclePoint: calcn_r (0 0.031 -0.0053)
    Thelen2003Muscle soleus_r: max_isometric_force=3549 optimal_fiber_length=0.05 tendon_slack_length=0.25
        pennation_angle=0.4363323 muscle_model=9
      MusclePoint: tibia_r (-0.0024 -0.1533 0.0071)
      MusclePoint: calcn_r (0 0.031 -0.0053)
    Thelen2003Muscle tib_post_r: max_isometric_force=1588 optimal_fiber_length=0.031 tendon_slack_length=0.31
        pennation_angle=0.2094395 muscle_model=9
      MusclePoint: tibia_r (-0.0094 -0.1348 0.0019)
      MusclePoint: tibia_r (-0.0144 -0.4051 -0.0229)
      MusclePoint: calcn_r (0.0417 0.0334 -0.0286)
      MusclePoint: calcn_r (0.0772 0.0159 -0.0281)
    Thelen2003Muscle flex_dig_r: max_isometric_force=310 optimal_fiber_length=0.034 tendon_slack_length=0.4
        pennation_angle=0.122173 muscle_model=9
      MusclePoint: tibia_r (-0.0083 -0.2046 -0.0018)
      MusclePoint: tibia_r (-0.0154 -0.4051 -0.0196)
      MusclePoint: calcn_r (0.0436 0.0315 -0.028)
      MusclePoint: calcn_r (0.0708 0.0176 -0.0263)
      MusclePoint: calcn_r (0.1658 -0.0081 0.0116)
      MusclePoint: toes_r (-0.0019 -0.0078 0.0147)
      MusclePoint: toes_r (0.0285 -0.0071 0.0215)
      MusclePoint: toes_r (0.0441 -0.006 0.0242)
    Thelen2003Muscle flex_hal_r: max_isometric_force=322 optimal_fiber_length=0.043 tendon_slack_length=0.38
        pennation_angle=0.1745329 muscle_model=9
      MusclePoint: tibia_r (-0.0079 -0.2334 0.0244)
      MusclePoint: tibia_r (-0.0186 -0.4079 -0.0174)
      MusclePoint: calcn_r (0.0374 0.0276 -0.0241)
      MusclePoint: calcn_r (0.1038 0.0068 -0.0256)
      MusclePoint: calcn_r (0.1726 -0.0053 -0.0269)
      MusclePoint: toes_r (0.0155 -0.0064 -0.0265)
      MusclePoint: toes_r (0.0562 -0.0102 -0.0181)
    Thelen2003Muscle tib_ant_r: max_isometric_force=905 optimal_fiber_length=0.098 tendon_slack_length=0.223
        pennation_angle=0.08726646 muscle_model=9
      MusclePoint: tibia_r (0.0179 -0.1624 0.0115)
      MusclePoint: tibia_r (0.0329 -0.3951 -0.0177)
      MusclePoint: calcn_r (0.1166 0.0178 -0.0305)
    Thelen2003Muscle per_brev_r: max_isometric_force=435 optimal_fiber_length=0.05 tendon_slack_length=0.161
        pennation_angle=0.08726646 muscle_model=9
      MusclePoint: tibia_r (-0.007 -0.2646 0.0325)
      MusclePoint: tibia_r (-0.0198 -0.4184 0.0283)
      MusclePoint: tibia_r (-0.0144 -0.4295 0.0289)
      MusclePoint: calcn_r (0.0471 0.027 0.0233)
      MusclePoint: calcn_r (0.0677 0.0219 0.0343)
    Thelen2003Muscle per_long_r: max_isometric_force=943 optimal_fiber_length=0.049 tendon_slack_length=0.345
        pennation_angle=0.1745329 muscle_model=9
      MusclePoint: tibia_r (0.0005 -0.1568 0.0362)
      MusclePoint: tibia_r (-0.0207 -0.4205 0.0286)
      MusclePoint: tibia_r (-0.0162 -0.4319 0.0289)
      MusclePoint: calcn_r (0.0438 0.023 0.0221)
      MusclePoint: calcn_r (0.0681 0.0106 0.0284)
      MusclePoint: calcn_r (0.0852 0.0069 0.0118)
      MusclePoint: calcn_r (0.1203 0.0085 -0.0184)
    Thelen2003Muscle per_tert_r: max_isometric_force=180 optimal_fiber_length=0.079 tendon_slack_length=0.1
        pennation_angle=0.2268928 muscle_model=9
      MusclePoint: tibia_r (0.001 -0.2804 0.0231)
      MusclePoint: tibia_r (0.0229 -0.4069 0.0159)
      MusclePoint: calcn_r (0.0857 0.0228 0.0299)
    Thelen2003Muscle ext_dig_r: max_isometric_force=512 optimal_fiber_length=0.102 tendon_slack_length=0.345
        pennation_angle=0.1396263 muscle_model=9
      MusclePoint: tibia_r (0.0032 -0.1381 0.0276)
      MusclePoint: tibia_r (0.0289 -0.4007 0.0072)
      MusclePoint: calcn_r (0.0922 0.0388 -0.0001)
      MusclePoint: calcn_r (0.1616 0.0055 0.013)
      MusclePoint: toes_r (0.0003 0.0047 0.0153)
      MusclePoint: toes_r (0.0443 -0.0004 0.025)
    Thelen2003Muscle ext_hal_r: max_isometric_force=162 optimal_fiber_length=0.111 tendon_slack_length=0.305
        pennation_angle=0.1047198 muscle_model=9
      MusclePoint: tibia_r (0.0012 -0.1767 0.0228)
      MusclePoint: tibia_r (0.0326 -0.3985 -0.0085)
      MusclePoint: calcn_r (0.097 0.0389 -0.0211)
      MusclePoint: calcn_r (0.1293 0.0309 -0.0257)
      MusclePoint: calcn_r (0.1734 0.0139 -0.028)
      MusclePoint: toes_r (0.0298 0.0041 -0.0245)
      MusclePoint: toes_r (0.0563 0.0034 -0.0186)
    Thelen2003Muscle glut_med1_l: max_isometric_force=819 optimal_fiber_length=0.0535 tendon_slack_length=0.078
        pennation_angle=0.1396263 muscle_model=9
      MusclePoint: pelvis (-0.0408 0.0304 -0.1209)
      MusclePoint: femur_l (-0.0218 -0.0117 -0.0555)
    Thelen2003Muscle glut_med2_l: max_isometric_force=573 optimal_fiber_length=0.0845 tendon_slack_length=0.053
        pennation_angle=0 muscle_model=9
      MusclePoint: pelvis (-0.0855 0.0445 -0.0766)
      MusclePoint: femur_l (-0.0258 -0.0058 -0.0527)
    Thelen2003Muscle glut_med3_l: max_isometric_force=653 optimal_fiber_length=0.0646 tendon_slack_length=0.053
        pennation_angle=0.3316126 muscle_model=9
      MusclePoint: pelvis (-0.1223 0.0105 -0.0648)
      MusclePoint: femur_l (-0.0309 -0.0047 -0.0518)
    Thelen2003Muscle glut_min1_l: max_isometric_force=270 optimal_fiber_length=0.068 tendon_slack_length=0.016
        pennation_angle=0.1745329 muscle_model=9
      MusclePoint: pelvis (-0.0467 -0.008 -0.1056)
      MusclePoint: femur_l (-0.0072 -0.0104 -0.056)
    Thelen2003Muscle glut_min2_l: max_isometric_force=285 optimal_fiber_length=0.056 tendon_slack_length=0.026
        pennation_angle=0 muscle_model=9
      MusclePoint: pelvis (-0.0633 -0.0065 -0.0991)
      MusclePoint: femur_l (-0.0096 -0.0104 -0.056)
    Thelen2003Muscle glut_min3_l: max_isometric_force=323 optimal_fiber_length=0.038 tendon_slack_length=0.051
        pennation_angle=0.01745329 muscle_model=9
      MusclePoint: pelvis (-0.0834 -0.0063 -0.0856)
      MusclePoint: femur_l (-0.0135 -0.0083 -0.055)
    Thelen2003Muscle semimem_l: max_isometric_force=1288 optimal_fiber_length=0.08 tendon_slack_length=0.359
        pennation_angle=0.2617994 muscle_model=9
      MusclePoint: pelvis (-0.1192 -0.09747 -0.07151)
      MuscleViaPoint: tibia_l (-0.0348 -0.03519 0.01891) coordinate=knee_angle_l range=(-0.5585054 0.1745329)
      MusclePoint: tibia_l (-0.027 -0.04771 0.01957)
    Thelen2003Muscle semiten_l: max_isometric_force=410 optimal_fiber_length=0.201 tendon_slack_length=0.2555
        pennation_angle=0.08726646 muscle_model=9
      MusclePoint: pelvis (-0.12635 -0.10988 -0.06039)
      MuscleViaPoint: tibia_l (-0.04203 -0.02859 0.02277) coordinate=knee_angle_l range=(-0.3316126 0.1745329)
      MusclePoint: tibia_l (-0.03322 -0.05282 0.02288)
      MusclePoint: tibia_l (-0.0113 -0.0746 0.0245)
      MusclePoint: tibia_l (0.0027 -0.0956 0.0193)
    Thelen2003Muscle bifemlh_l: max_isometric_force=896 optimal_fiber_length=0.109 tendon_slack_length=0.326
        pennation_angle=0 muscle_model=9
      MusclePoint: pelvis (-0.12596 -0.10257 -0.06944)
      MusclePoint: tibia_l (-0.0301 -0.036 -0.02943)
      MusclePoint: tibia_l (-0.0234 -0.0563 -0.0343)
    Thelen2003Muscle bifemsh_l: max_isometric_force=804 optimal_fiber_length=0.173 tendon_slack_length=0.089
        pennation_angle=0.4014257 muscle_model=9
      MusclePoint: femur_l (0.005 -0.2111 -0.0234)
      MusclePoint: tibia_l (-0.0301 -0.036 -0.02943)
      MusclePoint: tibia_l (-0.0234 -0.0563 -0.0343)
    Thelen2003Muscle sar_l: max_isometric_force=156 optimal_fiber_length=0.52 tendon_slack_length=0.1 pennation_angle=0
        muscle_model=9
      MusclePoint: pelvis (-0.0153 -0.0013 -0.1242)
      MusclePoint: femur_l (-0.003 -0.3568 0.0421)
      MusclePoint: tibia_l (-0.0056 -0.0419 0.0399)
      MusclePoint: tibia_l (0.006 -0.0589 0.0383)
      MusclePoint: tibia_l (0.0243 -0.084 0.0252)
    Thelen2003Muscle add_long_l: max_isometric_force=627 optimal_fiber_length=0.138 tendon_slack_length=0.11
        pennation_angle=0.1047198 muscle_model=9
      MusclePoint: pelvis (-0.0316 -0.0836 -0.0169)
      MusclePoint: femur_l (0.005 -0.2111 -0.0234)
    Thelen2003Muscle add_brev_l: max_isometric_force=429 optimal_fiber_length=0.133 tendon_slack_length=0.02
        pennation_angle=0 muscle_model=9
      MusclePoint: pelvis (-0.0587 -0.0915 -0.0164)
      MusclePoint: femur_l (0.0009 -0.1196 -0.0294)
    Thelen2003Muscle add_mag1_l: max_isometric_force=381 optimal_fiber_length=0.087 tendon_slack_length=0.06
        pennation_angle=0.08726646 muscle_model=9
      MusclePoint: pelvis (-0.0732 -0.1174 -0.0255)
      MusclePoint: femur_l (-0.0045 -0.1211 -0.0339)
    Thelen2003Muscle add_mag2_l: max_isometric_force=343 optimal_fiber_length=0.121 tendon_slack_length=0.12
        pennation_angle=0.05235988 muscle_model=9
      MusclePoint: pelvis (-0.0831 -0.1192 -0.0308)
      MusclePoint: femur_l (0.0054 -0.2285 -0.0227)
    Thelen2003Muscle add_mag3_l: max_isometric_force=488 optimal_fiber_length=0.131 tendon_slack_length=0.249
        pennation_angle=0.08726646 muscle_model=9
      MusclePoint: pelvis (-0.11108 -0.11413 -0.04882)
      MusclePoint: femur_l (0.007 -0.3837 0.0266)
    Thelen2003Muscle tfl_l: max_isometric_force=233 optimal_fiber_length=0.095 tendon_slack_length=0.425
        pennation_angle=0.05235988 muscle_model=9
      MusclePoint: pelvis (-0.0311 0.0214 -0.1241)
      MusclePoint: femur_l (0.0294 -0.0995 -0.0597)
      MusclePoint: femur_l (0.0054 -0.4049 -0.0357)
      MusclePoint: tibia_l (0.006 -0.0487 -0.0297)
    Thelen2003Muscle pect_l: max_isometric_force=266 optimal_fiber_length=0.1 tendon_slack_length=0.033
        pennation_angle=0 muscle_model=9
      MusclePoint: pelvis (-0.0431 -0.0768 -0.0451)
      MusclePoint: femur_l (-0.0122 -0.0822 -0.0253)
    Thelen2003Muscle grac_l: max_isometric_force=162 optimal_fiber_length=0.352 tendon_slack_length=0.126
        pennation_angle=0.05235988 muscle_model=9
      MusclePoint: pelvis (-0.07401 -0.1187 -0.02794)
      MuscleViaPoint: tibia_l (-0.02657 -0.0319 0.03774) coordinate=knee_angle_l range=(-0.4363323 0.1745329)
      MusclePoint: tibia_l (-0.01943 -0.05153 0.0358)
      MusclePoint: tibia_l (0.006 -0.0836 0.0228)
    Thelen2003Muscle glut_max1_l: max_isometric_force=573 optimal_fiber_length=0.142 tendon_slack_length=0.125
        pennation_angle=0.08726646 muscle_model=9
      MusclePoint: pelvis (-0.1195 0.0612 -0.07)
      MusclePoint: pelvis (-0.1291 0.0012 -0.0886)
      MusclePoint: femur_l (-0.0457 -0.0248 -0.0392)
      MusclePoint: femur_l (-0.0277 -0.0566 -0.047)
    Thelen2003Muscle glut_max2_l: max_isometric_force=819 optimal_fiber_length=0.147 tendon_slack_length=0.127
        pennation_angle=0 muscle_model=9
      MusclePoint: pelvis (-0.1349 0.0176 -0.0563)
      MusclePoint: pelvis (-0.1376 -0.052 -0.0914)
      MusclePoint: femur_l (-0.0426 -0.053 -0.0293)
      MusclePoint: femur_l (-0.0156 -0.1016 -0.0419)
    Thelen2003Muscle glut_max3_l: max_isometric_force=552 optimal_fiber_length=0.144 tendon_slack_length=0.145
        pennation_angle=0.08726646 muscle_model=9
      MusclePoint: pelvis (-0.1556 -0.0314 -0.0058)
      MusclePoint: pelvis (-0.1529 -0.1052 -0.0403)
      MusclePoint: femur_l (-0.0299 -0.1041 -0.0135)
      MusclePoint: femur_l (-0.006 -0.1419 -0.0411)
    Thelen2003Muscle iliacus_l: max_isometric_force=1073 optimal_fiber_length=0.1 tendon_slack_length=0.1
        pennation_angle=0.122173 muscle_model=9
      MusclePoint: pelvis (-0.0674 0.0365 -0.0854)
      MusclePoint: pelvis (-0.0258 -0.055 -0.0811)
      MuscleViaPoint: pelvis (-0.0288 -0.0805 -0.0816) coordinate=hip_flexion_l range=(-1.570796 0.7853982)
      MusclePoint: femur_l (0.0017 -0.0543 -0.0057)
      MusclePoint: femur_l (-0.0193 -0.0621 -0.0129)
    Thelen2003Muscle psoas_l: max_isometric_force=1113 optimal_fiber_length=0.1 tendon_slack_length=0.16
        pennation_angle=0.1396263 muscle_model=9
      MusclePoint: pelvis (-0.0647 0.0887 -0.0289)
      MusclePoint: pelvis (-0.0238 -0.057 -0.0759)
      MuscleViaPoint: pelvis (-0.0288 -0.0805 -0.0816) coordinate=hip_flexion_l range=(-1.570796 0.7853982)
      MusclePoint: femur_l (0.0016 -0.0507 -0.0038)
      MusclePoint: femur_l (-0.0188 -0.0597 -0.0104)
    Thelen2003Muscle quad_fem_l: max_isometric_force=381 optimal_fiber_length=0.054 tendon_slack_length=0.024
        pennation_angle=0 muscle_model=9
      MusclePoint: pelvis (-0.1143 -0.1151 -0.052)
      MusclePoint: femur_l (-0.0381 -0.0359 -0.0366)
    Thelen2003Muscle gem_l: max_isometric_force=164 optimal_fiber_length=0.024 tendon_slack_length=0.039
        pennation_angle=0 muscle_model=9
      MusclePoint: pelvis (-0.1133 -0.082 -0.0714)
      MusclePoint: femur_l (-0.0142 -0.0033 -0.0443)
    Thelen2003Muscle peri_l: max_isometric_force=444 optimal_fiber_length=0.026 tendon_slack_length=0.115
        pennation_angle=0.1745329 muscle_model=9
      MusclePoint: pelvis (-0.1396 0.0003 -0.0235)
      MusclePoint: pelvis (-0.1193 -0.0276 -0.0657)
      MusclePoint: femur_l (-0.0148 -0.0036 -0.0437)
    Thelen2003Muscle rect_fem_l: max_isometric_force=1169 optimal_fiber_length=0.114 tendon_slack_length=0.31
        pennation_angle=0.08726646 muscle_model=9
      MusclePoint: pelvis (-0.0295 -0.0311 -0.0968)
      MuscleViaPoint: femur_l (0.0334 -0.403 -0.0019) coordinate=knee_angle_l range=(-2.617994 -1.459968)
      MovingMusclePoint: tibia_l x_coordinate=knee_angle_l y_coordinate=knee_angle_l z_coordinate=knee_angle_l
        XAttachment:
          natCubicSpline: x=(-2.094395 -1.999973 -1.570796 -1.457524 -1.396263 -1.047198 -0.6981317 -0.5263913 -0.3490659 -0.1745329 0 0.0001745329 0.0003490659 0.02792527 0.08726646 0.1745329 2.094395)
              y=(0.0155805 0.01799382 0.0275081 0.02965635 0.03076155 0.03656953 0.04220742 0.04509018 0.048391 0.05342993 0.06175755 0.06176687 0.0617762 0.06330831 0.06699396 0.07330346 0.05734807)
        YAttachment:
          natCubicSpline: x=(-2.094395 -1.999973 -1.570796 -1.457524 -1.396263 -1.047198 -0.6981317 -0.5263913 -0.3490659 -0.1745329 0 0.0001745329 0.0003490659 0.02792527 0.08726646 0.1745329 2.094395)
              y=(0.02341162 0.02376131 0.02511413 0.02527948 0.02531463 0.0249184 0.02423731 0.02384473 0.02341972 0.0227644 0.02098402 0.02098143 0.02097883 0.02052247 0.01917541 0.01595544 -0.06737737)
        ZAttachment:
          natCubicSpline: x=(-2.0944 0.1745) y=(-0.0014 -0.0014)
    Thelen2003Muscle vas_med_l: max_isometric_force=1294 optimal_fiber_length=0.089 tendon_slack_length=0.126
        pennation_angle=0.08726646 muscle_model=9
      MusclePoint: femur_l (0.014 -0.2099 -0.0188)
      MusclePoint: femur_l (0.0356 -0.2769 -0.0009)
      MuscleViaPoint: femur_l (0.037 -0.4048 0.0125) coordinate=knee_angle_l range=(-2.617994 -1.210037)
      MuscleViaPoint: femur_l (0.0274 -0.4255 0.0131) coordinate=knee_angle_l range=(-2.617994 -1.780061)
      MovingMusclePoint: tibia_l x_coordinate=knee_angle_l y_coordinate=knee_angle_l z_coordinate=knee_angle_l
        XAttachment:
          natCubicSpline: x=(-2.094395 -1.999973 -1.570796 -1.457524 -1.396263 -1.047198 -0.6981317 -0.5263913 -0.3490659 -0.1745329 0 0.0001745329 0.0003490659 0.02792527 0.08726646 0.1745329 2.094395)
              y=(0.009810966 0.01222429 0.02173709 0.02388509 0.02499024 0.03079589 0.03641872 0.03928706 0.04256544 0.04757642 0.05595861 0.0559681 0.05597761 0.05754187 0.06133679 0.06795031 0.06293317)
        YAttachment:
          natCubicSpline: x=(-2.094395 -1.999973 -1.570796 -1.457524 -1.396263 -1.047198 -0.6981317 -0.5263913 -0.3490659 -0.1745329 0 0.0001745329 0.0003490659 0.02792527 0.08726646 0.1745329 2.094395)
              y=(0.0224154 0.02276508 0.02412648 0.02429332 0.02432872 0.02394625 0.02335927 0.02306768 0.02283423 0.0226362 0.02179166 0.02179031 0.02178894 0.02153648 0.02068419 0.01832688 -0.06562047)
        ZAttachment:
          natCubicSpline: x=(-2.094395 2.094395) y=(0.0146 0.0146)
    Thelen2003Muscle vas_int_l: max_isometric_force=1365 optimal_fiber_length=0.087 tendon_slack_length=0.136
        pennation_angle=0.05235988 muscle_model=9
      MusclePoint: femur_l (0.029 -0.1924 -0.031)
      MusclePoint: femur_l (0.0335 -0.2084 -0.0285)
      MuscleViaPoint: femur_l (0.0343 -0.403 -0.0055) coordinate=knee_angle_l range=(-2.617994 -1.42)
      MovingMusclePoint: tibia_l x_coordinate=knee_angle_l y_coordinate=knee_angle_l z_coordinate=knee_angle_l
        XAttachment:
          natCubicSpline: x=(-2.094395 -1.999973 -1.570796 -1.457524 -1.396263 -1.047198 -0.6981317 -0.5263913 -0.3490659 -0.1745329 0 0.0001745329 0.0003490659 0.02792527 0.08726646 0.1745329 2.094395)
              y=(0.0155805 0.01799382 0.0275081 0.02965635 0.03076155 0.03656953 0.04220742 0.04509018 0.048391 0.05342993 0.06175755 0.06176687 0.0617762 0.06330831 0.06699396 0.07330346 0.05734807)
        YAttachment:
          natCubicSpline: x=(-2.094395 -1.999973 -1.570796 -1.457524 -1.396263 -1.047198 -0.6981317 -0.5263913 -0.3490659 -0.1745329 0 0.0001745329 0.0003490659 0.02792527 0.08726646 0.1745329 2.094395)
              y=(0.02341162 0.02376131 0.02511413 0.02527948 0.02531463 0.0249184 0.02423731 0.02384473 0.02341972 0.0227644 0.02098402 0.02098143 0.02097883 0.02052247 0.01917541 0.01595544 -0.06737737)
        ZAttachment:
          natCubicSpline: x=(-2.0944 0.1745) y=(-0.0014 -0.0014)
    Thelen2003Muscle vas_lat_l: max_isometric_force=1871 optimal_fiber_length=0.084 tendon_slack_length=0.157
        pennation_angle=0.08726646 muscle_model=9
      MusclePoint: femur_l (0.0048 -0.1854 -0.0349)
      MusclePoint: femur_l (0.0269 -0.2591 -0.0409)
      MuscleViaPoint: femur_l (0.0361 -0.403 -0.0205) coordinate=knee_angle_l range=(-2.617994 -1.210037)
      MuscleViaPoint: femur_l (0.0253 -0.4243 -0.0184) coordinate=knee_angle_l range=(-2.617994 -1.920037)
      MovingMusclePoint: tibia_l x_coordinate=knee_angle_l y_coordinate=knee_angle_l z_coordinate=knee_angle_l
        XAttachment:
          natCubicSpline: x=(-2.094395 -1.999973 -1.570796 -1.457524 -1.396263 -1.047198 -0.6981317 -0.5263913 -0.3490659 -0.1745329 0 0.0001745329 0.0003490659 0.02792527 0.08726646 0.1745329 2.094395)
              y=(0.01428971 0.01670304 0.02621452 0.02836229 0.0294674 0.03527091 0.04087847 0.04372914 0.04697043 0.05187423 0.05995571 0.05996473 0.05997376 0.06145775 0.06503513 0.07118671 0.05837658)
        YAttachment:
          natCubicSpline: x=(-2.094395 -1.999973 -1.570796 -1.457524 -1.396263 -1.047198 -0.6981317 -0.5263913 -0.3490659 -0.1745329 0 0.0001745329 0.0003490659 0.02792527 0.08726646 0.1745329 2.094395)
              y=(0.02153176 0.02188145 0.02323619 0.02340187 0.02343708 0.02304394 0.02238424 0.02201509 0.02163591 0.02109712 0.0195864 0.01958419 0.01958197 0.01919002 0.01800795 0.0151073 -0.06534213)
        ZAttachment:
          natCubicSpline: x=(-2.094395 2.094395) y=(-0.0165 -0.0165)
    Thelen2003Muscle med_gas_l: max_isometric_force=1558 optimal_fiber_length=0.06 tendon_slack_length=0.39
        pennation_angle=0.296706 muscle_model=9
      MusclePoint: femur_l (-0.019 -0.3929 0.0235)
      MuscleViaPoint: femur_l (-0.03 -0.4022 0.0258) coordinate=knee_angle_l range=(-0.7853982 0.1745329)
      MusclePoint: calcn_l (0 0.031 0.0053)
    Thelen2003Muscle lat_gas_l: max_isometric_force=683 optimal_fiber_length=0.064 tendon_slack_length=0.38
        pennation_angle=0.1396263 muscle_model=9
      MusclePoint: femur_l (-0.022 -0.3946 -0.0272)
      MuscleViaPoint: femur_l (-0.03 -0.4018 -0.0274) coordinate=knee_angle_l range=(-0.7853982 0.1745329)
      MusclePoint: calcn_l (0 0.031 0.0053)
    Thelen2003Muscle soleus_l: max_isometric_force=3549 optimal_fiber_length=0.05 tendon_slack_length=0.25
        pennation_angle=0.4363323 muscle_model=9
      MusclePoint: tibia_l (-0.0024 -0.1533 -0.0071)
      MusclePoint: calcn_l (0 0.031 0.0053)
    Thelen2003Muscle tib_post_l: max_isometric_force=1588 optimal_fiber_length=0.031 tendon_slack_length=0.31
        pennation_angle=0.2094395 muscle_model=9
      MusclePoint: tibia_l (-0.0094 -0.1348 -0.0019)
      MusclePoint: tibia_l (-0.0144 -0.4051 0.0229)
      MusclePoint: calcn_l (0.0417 0.0334 0.0286)
      MusclePoint: calcn_l (0.0772 0.0159 0.0281)
    Thelen2003Muscle flex_dig_l: max_isometric_force=310 optimal_fiber_length=0.034 tendon_slack_length=0.4
        pennation_angle=0.122173 muscle_model=9
      MusclePoint: tibia_l (-0.0083 -0.2046 0.0018)
      MusclePoint: tibia_l (-0.0154 -0.4051 0.0196)
      MusclePoint: calcn_l (0.0436 0.0315 0.028)
      MusclePoint: calcn_l (0.0708 0.0176 0.0263)
      MusclePoint: calcn_l (0.1658 -0.0081 -0.0116)
      MusclePoint: toes_l (-0.0019 -0.0078 -0.0147)
      MusclePoint: toes_l (0.0285 -0.0071 -0.0215)
      MusclePoint: toes_l (0.0441 -0.006 -0.0242)
    Thelen2003Muscle flex_hal_l: max_isometric_force=322 optimal_fiber_length=0.043 tendon_slack_length=0.38
        pennation_angle=0.1745329 muscle_model=9
      MusclePoint: tibia_l (-0.0079 -0.2334 -0.0244)
      MusclePoint: tibia_l (-0.0186 -0.4079 0.0174)
      MusclePoint: calcn_l (0.0374 0.0276 0.0241)
      MusclePoint: calcn_l (0.1038 0.0068 0.0256)
      MusclePoint: calcn_l (0.1726 -0.0053 0.0269)
      MusclePoint: toes_l (0.0155 -0.0064 0.0265)
      MusclePoint: toes_l (0.0562 -0.0102 0.0181)
    Thelen2003Muscle tib_ant_l: max_isometric_force=905 optimal_fiber_length=0.098 tendon_slack_length=0.223
        pennation_angle=0.08726646 muscle_model=9
      MusclePoint: tibia_l (0.0179 -0.1624 -0.0115)
      MusclePoint: tibia_l (0.0329 -0.3951 0.0177)
      MusclePoint: calcn_l (0.1166 0.0178 0.0305)
    Thelen2003Muscle per_brev_l: max_isometric_force=435 optimal_fiber_length=0.05 tendon_slack_length=0.161
        pennation_angle=0.08726646 muscle_model=9
      MusclePoint: tibia_l (-0.007 -0.2646 -0.0325)
      MusclePoint: tibia_l (-0.0198 -0.4184 -0.0283)
      MusclePoint: tibia_l (-0.0144 -0.4295 -0.0289)
      MusclePoint: calcn_l (0.0471 0.027 -0.0233)
      MusclePoint: calcn_l (0.0677 0.0219 -0.0343)
    Thelen2003Muscle per_long_l: max_isometric_force=943 optimal_fiber_length=0.049 tendon_slack_length=0.345
        pennation_angle=0.1745329 muscle_model=9
      MusclePoint: tibia_l (0.0005 -0.1568 -0.0362)
      MusclePoint: tibia_l (-0.0207 -0.4205 -0.0286)
      MusclePoint: tibia_l (-0.0162 -0.4319 -0.0289)
      MusclePoint: calcn_l (0.0438 0.023 -0.0221)
      MusclePoint: calcn_l (0.0681 0.0106 -0.0284)
      MusclePoint: calcn_l (0.0852 0.0069 -0.0118)
      MusclePoint: calcn_l (0.1203 0.0085 0.0184)
    Thelen2003Muscle per_tert_l: max_isometric_force=180 optimal_fiber_length=0.079 tendon_slack_length=0.1
        pennation_angle=0.2268928 muscle_model=9
      MusclePoint: tibia_l (0.001 -0.2804 -0.0231)
      MusclePoint: tibia_l (0.0229 -0.4069 -0.0159)
      MusclePoint: calcn_l (0.0857 0.0228 -0.0299)
    Thelen2003Muscle ext_dig_l: max_isometric_force=512 optimal_fiber_length=0.102 tendon_slack_length=0.345
        pennation_angle=0.1396263 muscle_model=9
      MusclePoint: tibia_l (0.0032 -0.1381 -0.0276)
      MusclePoint: tibia_l (0.0289 -0.4007 -0.0072)
      MusclePoint: calcn_l (0.0922 0.0388 0.0001)
      MusclePoint: calcn_l (0.1616 0.0055 -0.013)
      MusclePoint: toes_l (0.0003 0.0047 -0.0153)
      MusclePoint: toes_l (0.0443 -0.0004 -0.025)
    Thelen2003Muscle ext_hal_l: max_isometric_force=162 optimal_fiber_length=0.111 tendon_slack_length=0.305
        pennation_angle=0.1047198 muscle_model=9
      MusclePoint: tibia_l (0.0012 -0.1767 -0.0228)
      MusclePoint: tibia_l (0.0326 -0.3985 0.0085)
      MusclePoint: calcn_l (0.097 0.0389 0.0211)
      MusclePoint: calcn_l (0.1293 0.0309 0.0257)
      MusclePoint: calcn_l (0.1734 0.0139 0.028)
      MusclePoint: toes_l (0.0298 0.0041 0.0245)
      MusclePoint: toes_l (0.0563 0.0034 0.0186)
    Thelen2003Muscle ercspn_r: max_isometric_force=2500 optimal_fiber_length=0.12 tendon_slack_length=0.03
        pennation_angle=0 muscle_model=9
      MusclePoint: pelvis (-0.14 0.0439 0.0436)
      MusclePoint: torso (-0.055 0.11 0.0241)
    Thelen2003Muscle ercspn_l: max_isometric_force=2500 optimal_fiber_length=0.12 tendon_slack_length=0.03
        pennation_angle=0 muscle_model=9
      MusclePoint: pelvis (-0.14 0.0439 -0.0436)
      MusclePoint: torso (-0.055 0.11 -0.0241)
    Thelen2003Muscle intobl_r: max_isometric_force=900 optimal_fiber_length=0.1 tendon_slack_length=0.1
        pennation_angle=0 muscle_model=9
      MusclePoint: pelvis (-0.04 0.07 0.1157)
      MusclePoint: torso (0.07 0.16 0.015)
    Thelen2003Muscle intobl_l: max_isometric_force=900 optimal_fiber_length=0.1 tendon_slack_length=0.1
        pennation_angle=0 muscle_model=9
      MusclePoint: pelvis (-0.04 0.07 -0.1157)
      MusclePoint: torso (0.07 0.16 -0.015)
    Thelen2003Muscle extobl_r: max_isometric_force=900 optimal_fiber_length=0.12 tendon_slack_length=0.14
        pennation_angle=0 muscle_model=9
      MusclePoint: pelvis (-0.03 -0.0636 0.01)
      MusclePoint: torso (0.065 0.11 0.11)
    Thelen2003Muscle extobl_l: max_isometric_force=900 optimal_fiber_length=0.12 tendon_slack_length=0.14
        pennation_angle=0 muscle_model=9
      MusclePoint: pelvis (-0.03 -0.0636 -0.01)
      MusclePoint: torso (0.065 0.11 -0.11)
  DynamicsEngine:
    SimbodyEngine: gravity=(0 -9.80665 0)
      BodySet:
        SimbodyBody ground: mass=0 mass_center=(0 0 0) inertia=(0 0 0 0 0 0 0 0 0)
        SimbodyBody pelvis: mass=11.777 mass_center=(-0.0707 0 0) inertia=(0.1028 0 0 0 0.0871 0 0 0 0.0579)
            meshes=(sacrum.vtp pelvis.vtp l_pelvis.vtp)
        SimbodyBody femur_r: mass=9.3014 mass_center=(0 -0.17 0) inertia=(0.1339 0 0 0 0.0351 0 0 0 0.1412)
            meshes=femur_r.vtp
        SimbodyBody tibia_r: mass=3.7075 mass_center=(0 -0.1867 0) inertia=(0.0504 0 0 0 0.0051 0 0 0 0.0511)
            meshes=(tibia_r.vtp fibula_r.vtp)
        SimbodyBody talus_r: mass=0.1 mass_center=(0 0 0) inertia=(0.001 0 0 0 0.001 0 0 0 0.001) meshes=talus_rv.vtp
        SimbodyBody calcn_r: mass=1.25 mass_center=(0.1 0.03 0) inertia=(0.0014 0 0 0 0.0039 0 0 0 0.0041)
            meshes=foot.vtp
        SimbodyBody toes_r: mass=0.2166 mass_center=(0.0346 0.006 -0.0175) inertia=(0.0001 0 0 0 0.0002 0 0 0 0.001)
            meshes=bofoot.vtp
        SimbodyBody femur_l: mass=9.3014 mass_center=(0 -0.17 0) inertia=(0.1339 0 0 0 0.0351 0 0 0 0.1412)
            meshes=femur_l.vtp
        SimbodyBody tibia_l: mass=3.7075 mass_center=(0 -0.1867 0) inertia=(0.0504 0 0 0 0.0051 0 0 0 0.0511)
            meshes=(tibia_l.vtp fibula_l.vtp)
        SimbodyBody talus_l: mass=0.1 mass_center=(0 0 0) inertia=(0.001 0 0 0 0.001 0 0 0 0.001) meshes=talus_lv.vtp
        SimbodyBody calcn_l: mass=1.25 mass_center=(0.1 0.03 0) inertia=(0.0014 0 0 0 0.0039 0 0 0 0.0041)
            meshes=l_foot.vtp
        SimbodyBody toes_l: mass=0.2166 mass_center=(0.0346 0.006 0.0175) inertia=(0.0001 0 0 0 0.0002 0 0 0 0.001)
            meshes=l_bofoot.vtp
        SimbodyBody torso: mass=26.8266 mass_center=(-0.03 0.32 0) inertia=(1.4745 0 0 0 0.7555 0 0 0 1.4314)
            meshes=(hat_spine.vtp hat_jaw.vtp hat_skull.vtp hat_ribs_scap.vtp)
        SimbodyBody humerus_r: mass=2.0325 mass_center=(0 -0.164502 0) inertia=(0.011946 0 0 0 0.004121 0 0 0 0.013409)
            meshes=humerus_rv.vtp
        SimbodyBody ulna_r: mass=0.6075 mass_center=(0 -0.120525 0) inertia=(0.002962 0 0 0 0.000618 0 0 0 0.003213)
            meshes=ulna_rv.vtp
        SimbodyBody radius_r: mass=0.6075 mass_center=(0 -0.120525 0) inertia=(0.002962 0 0 0 0.000618 0 0 0 0.003213)
            meshes=radius_rv.vtp
        SimbodyBody hand_r: mass=0.4575 mass_center=(0 -0.068095 0) inertia=(0.000892 0 0 0 0.000547 0 0 0 0.00134)
            meshes=(pisiform_rvs.vtp lunate_rvs.vtp scaphoid_rvs.vtp triquetrum_rvs.vtp hamate_rvs.vtp capitate_rvs.vtp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)
        SimbodyBody humerus_l: mass=2.0325 mass_center=(0 -0.164502 0) inertia=(0.011946 0 0 0 0.004121 0 0 0 0.013409)
            meshes=humerus_lv.vtp
        SimbodyBody ulna_l: mass=0.6075 mass_center=(0 -0.120525 0) inertia=(0.002962 0 0 0 0.000618 0 0 0 0.003213)
            meshes=ulna_lv.vtp
        SimbodyBody radius_l: mass=0.6075 mass_center=(0 -0.120525 0) inertia=(0.002962 0 0 0 0.000618 0 0 0 0.003213)
            meshes=radius_lv.vtp
        SimbodyBody hand_l: mass=0.4575 mass_center=(0 -0.068095 0) inertia=(0.000892 0 0 0 0.000547 0 0 0 0.00134)
            meshes=(pisiform_lvs.vtp lunate_lvs.vtp scaphoid_lvs.vtp triquetrum_lvs.vtp hamate_lvs.vtp capitate_lvs.vtp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)
      SimbodyCoordinate [values shared by the 37 below unless stated]: default_value=0 tolerance=0.00000001 stiffness=0
          clamped=true restraint_active=false
      SimbodyCoordinate pelvis_tx: range=(-5 5) keys=p_key
      SimbodyCoordinate pelvis_ty: range=(-1 2) keys=q_key
      SimbodyCoordinate pelvis_tz: range=(-3 3) keys=q_key
      SimbodyCoordinate pelvis_tilt: range=(-1.570796 1.570796) keys=q_key
      SimbodyCoordinate pelvis_list: range=(-1.570796 1.570796) keys=q_key
      SimbodyCoordinate pelvis_rotation: range=(-1.570796 1.570796) keys=q_key
      SimbodyCoordinate hip_flexion_r: range=(-2.094395 2.094395) keys=(h_key leftmouse_button)
      SimbodyCoordinate hip_adduction_r: range=(-2.094395 2.094395) keys=(h_key leftmouse_button)
      SimbodyCoordinate hip_rotation_r: range=(-2.094395 2.094395) keys=(h_key leftmouse_button)
      SimbodyCoordinate knee_angle_r: range=(-2.094395 0.1745329) keys=k_key
      SimbodyCoordinate ankle_angle_r: range=(-1.570796 1.570796) keys=a_key
      SimbodyCoordinate subtalar_angle_r: range=(-1.570796 1.570796) keys=a_key locked=true
      SimbodyCoordinate mtp_angle_r: range=(-1.570796 1.570796) keys=t_key locked=true
      SimbodyCoordinate hip_flexion_l: range=(-2.094395 2.094395) keys=(h_key leftmouse_button)
      SimbodyCoordinate hip_adduction_l: range=(-2.094395 2.094395) keys=(h_key leftmouse_button)
      SimbodyCoordinate hip_rotation_l: range=(-2.094395 2.094395) keys=(h_key leftmouse_button)
      SimbodyCoordinate knee_angle_l: range=(-2.094395 0.1745329) keys=k_key
      SimbodyCoordinate ankle_angle_l: range=(-1.047198 1.047198) keys=a_key
      SimbodyCoordinate subtalar_angle_l: range=(-1.570796 1.570796) keys=a_key locked=true
      SimbodyCoordinate mtp_angle_l: range=(-1.047198 1.047198) keys=t_key locked=true
      SimbodyCoordinate lumbar_extension: range=(-1.570796 1.570796) keys=q_key
      SimbodyCoordinate lumbar_bending: range=(-1.570796 1.570796) keys=q_key
      SimbodyCoordinate lumbar_rotation: range=(-1.570796 1.570796) keys=q_key
      SimbodyCoordinate arm_flex_r: range=(-1.570796 1.570796)
      SimbodyCoordinate arm_add_r: range=(-2.094395 1.570796)
      SimbodyCoordinate arm_rot_r: range=(-1.570796 1.570796)
      SimbodyCoordinate elbow_flex_r: range=(0 2.618)
      SimbodyCoordinate pro_sup_r: range=(0 1.570796)
      SimbodyCoordinate wrist_flex_r: range=(-1.22173 1.22173) locked=true
      SimbodyCoordinate wrist_dev_r: range=(-0.4363323 0.6108652) locked=true
      SimbodyCoordinate arm_flex_l: range=(-1.570796 1.570796)
      SimbodyCoordinate arm_add_l: range=(-2.094395 1.570796)
      SimbodyCoordinate arm_rot_l: range=(-1.570796 1.570796)
      SimbodyCoordinate elbow_flex_l: range=(0 2.618)
      SimbodyCoordinate pro_sup_l: range=(0 1.570796)
      SimbodyCoordinate wrist_flex_l: range=(-1.22173 1.22173) locked=true
      SimbodyCoordinate wrist_dev_l: range=(-0.4363323 0.6108652) locked=true
      SpeedSet:
        SimbodySpeed pelvis_tx_u: default_value=0 coordinate=pelvis_tx
        SimbodySpeed pelvis_ty_u: default_value=0 coordinate=pelvis_ty
        SimbodySpeed pelvis_tz_u: default_value=0 coordinate=pelvis_tz
        SimbodySpeed pelvis_tilt_u: default_value=0 coordinate=pelvis_tilt
        SimbodySpeed pelvis_list_u: default_value=0 coordinate=pelvis_list
        SimbodySpeed pelvis_rotation_u: default_value=0 coordinate=pelvis_rotation
        SimbodySpeed hip_flexion_r_u: default_value=0 coordinate=hip_flexion_r
        SimbodySpeed hip_adduction_r_u: default_value=0 coordinate=hip_adduction_r
        SimbodySpeed hip_rotation_r_u: default_value=0 coordinate=hip_rotation_r
        SimbodySpeed knee_angle_r_u: default_value=0 coordinate=knee_angle_r
        SimbodySpeed ankle_angle_r_u: default_value=0 coordinate=ankle_angle_r
        SimbodySpeed subtalar_angle_r_u: default_value=0 coordinate=subtalar_angle_r
        SimbodySpeed mtp_angle_r_u: default_value=0 coordinate=mtp_angle_r
        SimbodySpeed hip_flexion_l_u: default_value=0 coordinate=hip_flexion_l
        SimbodySpeed hip_adduction_l_u: default_value=0 coordinate=hip_adduction_l
        SimbodySpeed hip_rotation_l_u: default_value=0 coordinate=hip_rotation_l
        SimbodySpeed knee_angle_l_u: default_value=0 coordinate=knee_angle_l
        SimbodySpeed ankle_angle_l_u: default_value=0 coordinate=ankle_angle_l
        SimbodySpeed subtalar_angle_l_u: default_value=0 coordinate=subtalar_angle_l
        SimbodySpeed mtp_angle_l_u: default_value=0 coordinate=mtp_angle_l
        SimbodySpeed lumbar_extension_u: default_value=0 coordinate=lumbar_extension
        SimbodySpeed lumbar_bending_u: default_value=0 coordinate=lumbar_bending
        SimbodySpeed lumbar_rotation_u: default_value=0 coordinate=lumbar_rotation
        SimbodySpeed arm_flex_r_u: default_value=0 coordinate=arm_flex_r
        SimbodySpeed arm_add_r_u: default_value=0 coordinate=arm_add_r
        SimbodySpeed arm_rot_r_u: default_value=0 coordinate=arm_rot_r
        SimbodySpeed elbow_flex_r_u: default_value=0 coordinate=elbow_flex_r
        SimbodySpeed pro_sup_r_u: default_value=0 coordinate=pro_sup_r
        SimbodySpeed wrist_flex_r_u: default_value=0 coordinate=wrist_flex_r
        SimbodySpeed wrist_dev_r_u: default_value=0 coordinate=wrist_dev_r
        SimbodySpeed arm_flex_l_u: default_value=0 coordinate=arm_flex_l
        SimbodySpeed arm_add_l_u: default_value=0 coordinate=arm_add_l
        SimbodySpeed arm_rot_l_u: default_value=0 coordinate=arm_rot_l
        SimbodySpeed elbow_flex_l_u: default_value=0 coordinate=elbow_flex_l
        SimbodySpeed pro_sup_l_u: default_value=0 coordinate=pro_sup_l
        SimbodySpeed wrist_flex_l_u: default_value=0 coordinate=wrist_flex_l
        SimbodySpeed wrist_dev_l_u: default_value=0 coordinate=wrist_dev_l
      MarkerSet:
        Marker Sternum: torso (0.1 0.24 0)
        Marker R.Acromium: torso (-0.03 0.42 0.15)
        Marker L.Acromium: torso (-0.03 0.42 -0.15)
        Marker C7: torso (-0.07 0.44 0)
        Marker T10: torso (-0.1 0.22 0)
        Marker Clavicle: torso (0.04 0.38 0)
        Marker RSJC: humerus_r (0 0 0)
        Marker R.Bicep: humerus_r (-0.04 -0.15 0)
        Marker RUA1: humerus_r (0 -0.05 0.02)
        Marker RUA2: humerus_r (0 -0.2 0.02)
        Marker RUA3: humerus_r (0.03 -0.13 0.02)
        Marker RUAmedial: humerus_r (-0.01 -0.25 -0.025)
        Marker R.Elbow: humerus_r (0.00729 -0.28128 0.06786)
        Marker RMEL: humerus_r (0.00175 -0.28389 -0.07029)
        Marker REJC: humerus_r (0.00584 -0.28069 -0.0002)
        Marker RFAsuperior: ulna_r (-0.02 -0.15 0.03)
        Marker RFAradius: radius_r (-0.02 -0.19312 0.032)
        Marker RFAulna: radius_r (-0.020531 -0.20672 -0.00839)
        Marker R.Wrist.Med: radius_r (-0.01531 -0.23272 -0.01839)
        Marker R.Wrist.Lat: radius_r (-0.00316 -0.22312 0.04988)
        Marker RWJC: radius_r (-0.01 -0.23187 0.017)
        Marker RHNknuckle: hand_r (-0.02193 -0.05913 0.00021)
        Marker RHNulna: hand_r (-0.03013 -0.02726 -0.01715)
        Marker RHNradius: hand_r (-0.01901 -0.02517 0.02667)
        Marker LSJC: humerus_l (0 0 0)
        Marker L.Bicep: humerus_l (-0.04 -0.15 0)
        Marker LUA1: humerus_l (0 -0.05 -0.02)
        Marker LUA2: humerus_l (0 -0.2 -0.02)
        Marker LUA3: humerus_l (0.03 -0.13 -0.02)
        Marker LUAmedial: humerus_l (-0.01 -0.25 0.025)
        Marker L.Elbow: humerus_l (0.00729 -0.28128 -0.06786)
        Marker LMEL: humerus_l (0.00175 -0.28389 0.07029)
        Marker LEJC: humerus_l (0.00584 -0.28069 0.0002)
        Marker LFAsuperior: ulna_l (-0.02 -0.15 -0.03)
        Marker LFAradius: radius_l (-0.02 -0.19312 -0.032)
        Marker LFAulna: radius_l (-0.020531 -0.20672 0.00839)
        Marker L.Wrist.Med: radius_l (-0.01531 -0.23272 0.01839)
        Marker L.Wrist.Lat: radius_l (-0.00316 -0.22312 -0.04988)
        Marker LWJC: radius_l (-0.01 -0.23187 -0.017)
        Marker LHNknuckle: hand_l (-0.02231 -0.05623 0.00042)
        Marker LHNulna: hand_l (-0.02793 -0.01641 0.0244)
        Marker LHNradius: hand_l (-0.00386 -0.02153 -0.0276)
        Marker R.ASIS: pelvis (0.02 0.03 0.128)
        Marker L.ASIS: pelvis (0.02 0.03 -0.128)
        Marker V.Sacral: pelvis (-0.16 0.04 0)
        Marker LHJC: pelvis (-0.0707 -0.0661 0.0835)
        Marker RHJC: pelvis (-0.0707 -0.0661 -0.0835)
        Marker R.Thigh.Upper: femur_r (0.018 -0.15 0.064)
        Marker R.Thigh.Rear: femur_r (0.08 -0.23 0.0047)
        Marker R.Thigh.Front: femur_r (0.01 -0.3 0.06)
        Marker R.Knee.Lat: femur_r (0 -0.404 0.05)
        Marker R.Knee.Med: femur_r (0 -0.404 -0.05)
        Marker RKJC: femur_r (0 -0.404 0)
        Marker R.Shank.Upper: tibia_r (0.005 -0.11 0.05)
        Marker R.Shank.Rear: tibia_r (0.05 -0.18 0)
        Marker R.Shank.Front: tibia_r (0.02 -0.35 0.05)
        Marker R.Ankle.Lat: tibia_r (-0.005 -0.41 0.053)
        Marker R.Ankle.Med: tibia_r (0.006 -0.3888 -0.038)
        Marker RAJC: tibia_r (0 -0.4 0)
        Marker R.Heel: calcn_r (-0.02 0.02 0)
        Marker R.Toe.Tip: calcn_r (0.18 0.03 0)
        Marker R.Midfoot.Lat: calcn_r (0.12 0.02 0.05)
        Marker R.Midfoot.Sup: calcn_r (0.12 0.04 0.05)
        Marker R.Toe.Lat: calcn_r (0.14 0.02 0.05)
        Marker R.Toe.Med: calcn_r (0.14 0.02 0.02)
        Marker L.Thigh.Upper: femur_l (0.018 -0.15 -0.064)
        Marker L.Thigh.Rear: femur_l (0.08 -0.23 -0.0047)
        Marker L.Thigh.Front: femur_l (0.01 -0.3 -0.06)
        Marker L.Knee.Lat: femur_l (0 -0.404 -0.05)
        Marker L.Knee.Med: femur_l (0 -0.404 0.05)
        Marker LKJC: femur_l (0 -0.404 0)
        Marker L.Shank.Upper: tibia_l (0.005 -0.11 -0.05)
        Marker L.Shank.Rear: tibia_l (0.05 -0.18 0)
        Marker L.Shank.Front: tibia_l (-0.02 -0.35 -0.05)
        Marker L.Ankle.Lat: tibia_l (-0.005 -0.41 -0.053)
        Marker L.Ankle.Med: tibia_l (0.006 -0.3888 0.038)
        Marker LAJC: tibia_l (0 -0.4 0)
        Marker L.Heel: calcn_l (-0.02 0.02 0)
        Marker L.Toe.Tip: calcn_l (0.18 0.03 0)
        Marker L.Midfoot.Lat: calcn_l (0.12 0.02 -0.05)
        Marker L.Midfoot.Sup: calcn_l (0.12 0.04 -0.05)
        Marker L.Toe.Lat: calcn_l (0.14 0.02 -0.05)
        Marker L.Toe.Med: calcn_l (0.14 0.02 -0.02)
      JointSet:
        SimbodyJoint ground_pelvis: bodies=(ground pelvis)
          DofSet:
            SimbodyTranslationDof tx: coordinate=pelvis_tx
              Value:
                natCubicSpline: x=(-360 360) y=(-360 360)
            SimbodyTranslationDof ty: coordinate=pelvis_ty
              Value:
                natCubicSpline: x=(-360 360) y=(-360 360)
            SimbodyTranslationDof tz: coordinate=pelvis_tz
              Value:
                natCubicSpline: x=(-360 360) y=(-360 360)
            SimbodyRotationDof r1: axis=(0 0 1) coordinate=pelvis_tilt
              Value:
                natCubicSpline: x=(-6.283185 6.283185) y=(-6.283185 6.283185)
            SimbodyRotationDof r2: axis=(1 0 0) coordinate=pelvis_list
              Value:
                natCubicSpline: x=(-6.283185 6.283185) y=(-6.283185 6.283185)
            SimbodyRotationDof r3: axis=(0 1 0) coordinate=pelvis_rotation
              Value:
                natCubicSpline: x=(-6.283185 6.283185) y=(-6.283185 6.283185)
        SimbodyJoint hip_r: bodies=(pelvis femur_r)
          DofSet:
            SimbodyTranslationDof tx:
              Value: Constant(value=-0.0707)
            SimbodyTranslationDof ty:
              Value: Constant(value=-0.0661)
            SimbodyTranslationDof tz:
              Value: Constant(value=0.0835)
            SimbodyRotationDof r1: axis=(0 0 1) coordinate=hip_flexion_r
              Value:
                natCubicSpline: x=(-6.283185 6.283185) y=(-6.283185 6.283185)
            SimbodyRotationDof r2: axis=(1 0 0) coordinate=hip_adduction_r
              Value:
                natCubicSpline: x=(-6.283185 6.283185) y=(-6.283185 6.283185)
            SimbodyRotationDof r3: axis=(0 1 0) coordinate=hip_rotation_r
              Value:
                natCubicSpline: x=(-6.283185 6.283185) y=(-6.283185 6.283185)
        SimbodyJoint knee_r: bodies=(femur_r tibia_r)
          DofSet:
            SimbodyTranslationDof tx: coordinate=knee_angle_r
              Value:
                natCubicSpline: x=(-2.094395 -1.745329 -1.396263 -1.047198 -0.6981317 -0.3490659 -0.1745329 0.1973442 0.337395 0.4901776 1.52146 2.094395)
                    y=(-0.0032 0.00179 0.00411 0.0041 0.00212 -0.001 -0.0031 -0.005227 -0.005435 -0.005574 -0.005435 -0.00525)
            SimbodyTranslationDof ty: coordinate=knee_angle_r
              Value:
                natCubicSpline: x=(-2.094395 -1.22173 -0.5235988 -0.3490659 -0.1745329 0.1591486 2.094395)
                    y=(-0.4226 -0.4082 -0.399 -0.3976 -0.3966 -0.395264 -0.396)
            SimbodyTranslationDof tz:
              Value: Constant(value=0)
            SimbodyRotationDof r1: axis=(0 0 1) coordinate=knee_angle_r
              Value:
                natCubicSpline: x=(-6.283185 6.283185) y=(-6.283185 6.283185)
            SimbodyRotationDof r2: axis=(1 0 0)
              Value: Constant(value=0)
            SimbodyRotationDof r3: axis=(0 1 0)
              Value: Constant(value=0)
        SimbodyJoint ankle_r: bodies=(tibia_r talus_r)
          DofSet:
            SimbodyTranslationDof tx:
              Value: Constant(value=0)
            SimbodyTranslationDof ty:
              Value: Constant(value=-0.43)
            SimbodyTranslationDof tz:
              Value: Constant(value=0)
            SimbodyRotationDof r1: axis=(-0.1050135 -0.1740225 0.9791263) coordinate=ankle_angle_r
              Value:
                natCubicSpline: x=(-6.283185 6.283185) y=(-6.283185 6.283185)
            SimbodyRotationDof r2: axis=(1 0 0)
              Value: Constant(value=0)
            SimbodyRotationDof r3: axis=(0 1 0)
              Value: Constant(value=0)
        SimbodyJoint subtalar_r: bodies=(talus_r calcn_r)
          DofSet:
            SimbodyTranslationDof tx:
              Value: Constant(value=-0.04877)
            SimbodyTranslationDof ty:
              Value: Constant(value=-0.04195)
            SimbodyTranslationDof tz:
              Value: Constant(value=0.00792)
            SimbodyRotationDof r1: axis=(0.7871796 0.6047475 -0.1209495) coordinate=subtalar_angle_r
              Value:
                natCubicSpline: x=(-6.283185 6.283185) y=(-6.283185 6.283185)
            SimbodyRotationDof r2: axis=(0 1 0)
              Value: Constant(value=0)
            SimbodyRotationDof r3: axis=(0 0 1)
              Value: Constant(value=0)
        SimbodyJoint mtp_r: bodies=(calcn_r toes_r)
          DofSet:
            SimbodyTranslationDof tx:
              Value: Constant(value=0.1788)
            SimbodyTranslationDof ty:
              Value: Constant(value=-0.002)
            SimbodyTranslationDof tz:
              Value: Constant(value=0.00108)
            SimbodyRotationDof r1: axis=(-0.5809544 0 0.8139361) coordinate=mtp_angle_r
              Value:
                natCubicSpline: x=(-6.283185 6.283185) y=(-6.283185 6.283185)
            SimbodyRotationDof r2: axis=(1 0 0)
              Value: Constant(value=0)
            SimbodyRotationDof r3: axis=(0 1 0)
              Value: Constant(value=0)
        SimbodyJoint hip_l: bodies=(pelvis femur_l)
          DofSet:
            SimbodyTranslationDof tx:
              Value: Constant(value=-0.0707)
            SimbodyTranslationDof ty:
              Value: Constant(value=-0.0661)
            SimbodyTranslationDof tz:
              Value: Constant(value=-0.0835)
            SimbodyRotationDof r1: axis=(0 0 1) coordinate=hip_flexion_l
              Value:
                natCubicSpline: x=(-6.283185 6.283185) y=(-6.283185 6.283185)
            SimbodyRotationDof r2: axis=(-1 0 0) coordinate=hip_adduction_l
              Value:
                natCubicSpline: x=(-6.283185 6.283185) y=(-6.283185 6.283185)
            SimbodyRotationDof r3: axis=(0 -1 0) coordinate=hip_rotation_l
              Value:
                natCubicSpline: x=(-6.283185 6.283185) y=(-6.283185 6.283185)
        SimbodyJoint knee_l: bodies=(femur_l tibia_l)
          DofSet:
            SimbodyTranslationDof tx: coordinate=knee_angle_l
              Value:
                natCubicSpline: x=(-2.094395 -1.745329 -1.396263 -1.047198 -0.6981317 -0.3490659 -0.1745329 0.1973442 0.337395 0.4901776 1.52146 2.094395)
                    y=(-0.0032 0.00179 0.00411 0.0041 0.00212 -0.001 -0.0031 -0.005227 -0.005435 -0.005574 -0.005435 -0.00525)
            SimbodyTranslationDof ty: coordinate=knee_angle_l
              Value:
                natCubicSpline: x=(-2.094395 -1.22173 -0.5235988 -0.3490659 -0.1745329 0.1591486 2.094395)
                    y=(-0.4226 -0.4082 -0.399 -0.3976 -0.3966 -0.395264 -0.396)
            SimbodyTranslationDof tz:
              Value: Constant(value=0)
            SimbodyRotationDof r1: axis=(0 0 1) coordinate=knee_angle_l
              Value:
                natCubicSpline: x=(-6.283185 6.283185) y=(-6.283185 6.283185)
            SimbodyRotationDof r2: axis=(1 0 0)
              Value: Constant(value=0)
            SimbodyRotationDof r3: axis=(0 1 0)
              Value: Constant(value=0)
        SimbodyJoint ankle_l: bodies=(tibia_l talus_l)
          DofSet:
            SimbodyTranslationDof tx:
              Value: Constant(value=0)
            SimbodyTranslationDof ty:
              Value: Constant(value=-0.43)
            SimbodyTranslationDof tz:
              Value: Constant(value=0)
            SimbodyRotationDof r1: axis=(0.1050135 0.1740225 0.9791263) coordinate=ankle_angle_l
              Value:
                natCubicSpline: x=(-6.283185 6.283185) y=(-6.283185 6.283185)
            SimbodyRotationDof r2: axis=(1 0 0)
              Value: Constant(value=0)
            SimbodyRotationDof r3: axis=(0 1 0)
              Value: Constant(value=0)
        SimbodyJoint subtalar_l: bodies=(talus_l calcn_l)
          DofSet:
            SimbodyTranslationDof tx:
              Value: Constant(value=-0.04877)
            SimbodyTranslationDof ty:
              Value: Constant(value=-0.04195)
            SimbodyTranslationDof tz:
              Value: Constant(value=-0.00792)
            SimbodyRotationDof r1: axis=(-0.7871796 -0.6047475 -0.1209495) coordinate=subtalar_angle_l
              Value:
                natCubicSpline: x=(-6.283185 6.283185) y=(-6.283185 6.283185)
            SimbodyRotationDof r2: axis=(0 1 0)
              Value: Constant(value=0)
            SimbodyRotationDof r3: axis=(0 0 1)
              Value: Constant(value=0)
        SimbodyJoint mtp_l: bodies=(calcn_l toes_l)
          DofSet:
            SimbodyTranslationDof tx:
              Value: Constant(value=0.1788)
            SimbodyTranslationDof ty:
              Value: Constant(value=-0.002)
            SimbodyTranslationDof tz:
              Value: Constant(value=-0.00108)
            SimbodyRotationDof r1: axis=(0.5809544 0 0.8139361) coordinate=mtp_angle_l
              Value:
                natCubicSpline: x=(-6.283185 6.283185) y=(-6.283185 6.283185)
            SimbodyRotationDof r2: axis=(1 0 0)
              Value: Constant(value=0)
            SimbodyRotationDof r3: axis=(0 1 0)
              Value: Constant(value=0)
        SimbodyJoint back: bodies=(pelvis torso)
          DofSet:
            SimbodyTranslationDof tx:
              Value: Constant(value=-0.1007)
            SimbodyTranslationDof ty:
              Value: Constant(value=0.0815)
            SimbodyTranslationDof tz:
              Value: Constant(value=0)
            SimbodyRotationDof r1: axis=(0 0 1) coordinate=lumbar_extension
              Value:
                natCubicSpline: x=(-6.283185 6.283185) y=(-6.283185 6.283185)
            SimbodyRotationDof r2: axis=(1 0 0) coordinate=lumbar_bending
              Value:
                natCubicSpline: x=(-6.283185 6.283185) y=(-6.283185 6.283185)
            SimbodyRotationDof r3: axis=(0 1 0) coordinate=lumbar_rotation
              Value:
                natCubicSpline: x=(-6.283185 6.283185) y=(-6.283185 6.283185)
        SimbodyJoint acromial_r: bodies=(torso humerus_r)
          DofSet:
            SimbodyTranslationDof tx:
              Value: Constant(value=0.003155)
            SimbodyTranslationDof ty:
              Value: Constant(value=0.3715)
            SimbodyTranslationDof tz:
              Value: Constant(value=0.17)
            SimbodyRotationDof r1: axis=(0 0 1) coordinate=arm_flex_r
              Value:
                natCubicSpline: x=(-6.283185 6.283185) y=(-6.283185 6.283185)
            SimbodyRotationDof r2: axis=(1 0 0) coordinate=arm_add_r
              Value:
                natCubicSpline: x=(-6.283185 6.283185) y=(-6.283185 6.283185)
            SimbodyRotationDof r3: axis=(0 1 0) coordinate=arm_rot_r
              Value:
                natCubicSpline: x=(-6.283185 6.283185) y=(-6.283185 6.283185)
        SimbodyJoint elbow_r: bodies=(humerus_r ulna_r)
          DofSet:
            SimbodyTranslationDof tx:
              Value: Constant(value=0.013144)
            SimbodyTranslationDof ty:
              Value: Constant(value=-0.286273)
            SimbodyTranslationDof tz:
              Value: Constant(value=-0.009595)
            SimbodyRotationDof r1: axis=(0.226047 0.022269 0.9738618) coordinate=elbow_flex_r
              Value:
                natCubicSpline: x=(-6.283185 6.283185) y=(-6.283185 6.283185)
            SimbodyRotationDof r2: axis=(0 1 0)
              Value: Constant(value=0)
            SimbodyRotationDof r3: axis=(1 0 0)
              Value: Constant(value=0)
        SimbodyJoint radioulnar_r: bodies=(ulna_r radius_r)
          DofSet:
            SimbodyTranslationDof tx:
              Value: Constant(value=-0.006727)
            SimbodyTranslationDof ty:
              Value: Constant(value=-0.013007)
            SimbodyTranslationDof tz:
              Value: Constant(value=0.026083)
            SimbodyRotationDof r1: axis=(0.05639803 0.9984065 0.001952001) coordinate=pro_sup_r
              Value:
                natCubicSpline: x=(-6.283185 6.283185) y=(-6.283185 6.283185)
            SimbodyRotationDof r2: axis=(1 0 0)
              Value: Constant(value=0)
            SimbodyRotationDof r3: axis=(0 0 1)
              Value: Constant(value=0)
        SimbodyJoint radius_hand_r: bodies=(radius_r hand_r)
          DofSet:
            SimbodyTranslationDof tx:
              Value: Constant(value=-0.008797)
            SimbodyTranslationDof ty:
              Value: Constant(value=-0.235841)
            SimbodyTranslationDof tz:
              Value: Constant(value=0.01361)
            SimbodyRotationDof r1: axis=(0 0 1) coordinate=wrist_flex_r
              Value:
                natCubicSpline: x=(-6.283185 6.283185) y=(-6.283185 6.283185)
            SimbodyRotationDof r2: axis=(1 0 0) coordinate=wrist_dev_r
              Value:
                natCubicSpline: x=(-6.283185 6.283185) y=(-6.283185 6.283185)
            SimbodyRotationDof r3: axis=(0 1 0)
              Value: Constant(value=0)
        SimbodyJoint acromial_l: bodies=(torso humerus_l)
          DofSet:
            SimbodyTranslationDof tx:
              Value: Constant(value=0.003155)
            SimbodyTranslationDof ty:
              Value: Constant(value=0.3715)
            SimbodyTranslationDof tz:
              Value: Constant(value=-0.17)
            SimbodyRotationDof r1: axis=(0 0 1) coordinate=arm_flex_l
              Value:
                natCubicSpline: x=(-6.283185 6.283185) y=(-6.283185 6.283185)
            SimbodyRotationDof r2: axis=(-1 0 0) coordinate=arm_add_l
              Value:
                natCubicSpline: x=(-6.283185 6.283185) y=(-6.283185 6.283185)
            SimbodyRotationDof r3: axis=(0 -1 0) coordinate=arm_rot_l
              Value:
                natCubicSpline: x=(-6.283185 6.283185) y=(-6.283185 6.283185)
        SimbodyJoint elbow_l: bodies=(humerus_l ulna_l)
          DofSet:
            SimbodyTranslationDof tx:
              Value: Constant(value=0.013144)
            SimbodyTranslationDof ty:
              Value: Constant(value=-0.286273)
            SimbodyTranslationDof tz:
              Value: Constant(value=0.009595)
            SimbodyRotationDof r1: axis=(-0.226047 -0.022269 0.9738618) coordinate=elbow_flex_l
              Value:
                natCubicSpline: x=(-6.283185 6.283185) y=(-6.283185 6.283185)
            SimbodyRotationDof r2: axis=(0 -1 0)
              Value: Constant(value=0)
            SimbodyRotationDof r3: axis=(-1 0 0)
              Value: Constant(value=0)
        SimbodyJoint radioulnar_l: bodies=(ulna_l radius_l)
          DofSet:
            SimbodyTranslationDof tx:
              Value: Constant(value=-0.006727)
            SimbodyTranslationDof ty:
              Value: Constant(value=-0.013007)
            SimbodyTranslationDof tz:
              Value: Constant(value=-0.026083)
            SimbodyRotationDof r1: axis=(-0.05639803 -0.9984065 0.001952001) coordinate=pro_sup_l
              Value:
                natCubicSpline: x=(-6.283185 6.283185) y=(-6.283185 6.283185)
            SimbodyRotationDof r2: axis=(0 1 0)
              Value: Constant(value=0)
            SimbodyRotationDof r3: axis=(0 0 1)
              Value: Constant(value=0)
        SimbodyJoint radius_hand_l: bodies=(radius_l hand_l)
          DofSet:
            SimbodyTranslationDof tx:
              Value: Constant(value=-0.008797)
            SimbodyTranslationDof ty:
              Value: Constant(value=-0.235841)
            SimbodyTranslationDof tz:
              Value: Constant(value=-0.01361)
            SimbodyRotationDof r1: axis=(0 0 1) coordinate=wrist_flex_l
              Value:
                natCubicSpline: x=(-6.283185 6.283185) y=(-6.283185 6.283185)
            SimbodyRotationDof r2: axis=(-1 0 0) coordinate=wrist_dev_l
              Value:
                natCubicSpline: x=(-6.283185 6.283185) y=(-6.283185 6.283185)
            SimbodyRotationDof r3: axis=(0 -1 0)
              Value: Constant(value=0)
