# OpenSim document version 30000
Model simple12.osim:
  length_units: meters
  force_units: N
  gravity: 0 -9.80665 0
  credits:
    A planar reduced model with 1 degrees of freedom and 2 muscles by Aravind Sundararajan and Jeff Reinbolt. Closely based on Francicso Valero-Cuevas' work.
  BodySet:
    Body ground: mass=0 mass_center=(0 0 0) inertia_xx=0 inertia_yy=0 inertia_zz=0 meshes=box.vtp
      WrapEllipsoid muscle12_joint1: translation=(-.015 0 0) quadrant=all dimensions=(.03 .02 .03)
    Body link1: mass=0.1 mass_center=(0 -0.05 0) inertia_xx=2.5e-6 inertia_yy=5e-6 inertia_zz=2.5e-6
        meshes=(cylinder.vtp sphere.vtp)
      CustomJoint ground_link1: parent_body=ground location_in_parent=(0 0 0) orientation_in_parent=(0 0 1.570796)
          location=(0 0 0)
        Coordinate joint1: motion_type=rotational default_value=0.3926991 range=(-1.570796 1.570796) clamped=false
        SpatialTransform: axes_held_at_zero=(rotation2 rotation3 translation1 translation2 translation3)
          TransformAxis rotation1: coordinates=joint1 axis=(0 0 1) LinearFunction(coefficients=1 0)
  ForceSet:
    Millard2012EquilibriumMuscle muscle1: min_control=0 max_control=1 optimal_force=1 max_isometric_force=35
        optimal_fiber_length=0.1554545 tendon_slack_length=0.01554545 pennation_angle_at_optimal=0 [radians]
        max_contraction_velocity=10 activation_time_constant=0.01 [seconds] deactivation_time_constant=0.04 [seconds]
        minimum_activation=0.01
      PathPoint P1: ground (-0.02 0.02 0)
      PathPoint P4: link1 (0.01 -0.05 0)
      PathWrap: wrap_object=muscle12_joint1 method=hybrid
      ActiveForceLengthCurve: minimum_value=0
      ForceVelocityCurve: concentric_slope_at_vmax=0 concentric_slope_near_vmax=0.25 isometric_slope=5
          eccentric_slope_at_vmax=0 eccentric_slope_near_vmax=0.15 max_eccentric_velocity_force_multiplier=1.4
      FiberForceLengthCurve
      TendonForceLengthCurve
    Millard2012EquilibriumMuscle muscle2: min_control=0 max_control=1 optimal_force=1 max_isometric_force=70
        optimal_fiber_length=0.1381818 tendon_slack_length=0.01381818 pennation_angle_at_optimal=0
        max_contraction_velocity=10 activation_time_constant=0.01 deactivation_time_constant=0.04
        minimum_activation=0.01
      PathPoint P1: ground (-0.02 -0.02 0)
      PathPoint P4: link1 (-0.01 -0.05 0)
      PathWrap: wrap_object=muscle12_joint1 method=hybrid
      ActiveForceLengthCurve: minimum_value=0
      ForceVelocityCurve: concentric_slope_at_vmax=0 concentric_slope_near_vmax=0.25 isometric_slope=5
          eccentric_slope_at_vmax=0 eccentric_slope_near_vmax=0.15 max_eccentric_velocity_force_multiplier=1.4
      FiberForceLengthCurve
      TendonForceLengthCurve
